// SBML level 2 version 1

model Model_0()
  // Klipp2002_MetabolicOptimization_linearPathway(n=2)
  // The model describes time dependent gene expression as a means to enable cells to adapt metabolic activity optimally based on environmental conditions. It uses a simple unbranched pathway and a constraint of fixed total enzyme. It calculates enzyme profiles at different times which optimise a performance function, and compares them to experimental data. The initial model is cell-type agnostic, while the experimeental data is from yeast.
  // This model is described in the article:
  // Prediction of temporal gene expression. Metabolic opimization by re-distribution of enzyme activities.
  // Klipp E, Heinrich R, Holzhütter HG.
  // Eur. J. Biochem. 2002 Nov; 269(22): 5406-5413
  // Abstract:
  // A computational approach is used to analyse temporal gene expression in the context of metabolic regulation. It is based on the assumption that cells developed optimal adaptation strategies to changing environmental conditions. Time- dependent enzyme profiles are calculated which optimize the function of a metabolic pathway under the constraint of limited total enzyme amount. For linear model pathways it is shown that wave-like enzyme profiles are optimal for a rapid substrate turnover. For the central metabolism of yeast cells enzyme profiles are calculated which ensure long-term homeostasis of key metabolites under conditions of a diauxic shift. These enzyme profiles are in close correlation with observed gene expression data. Our results demonstrate that optimality principles help to rationalize observed gene expression profiles.
  // This model is from the paper Prediction of temporal gene expression metabolic optimization by re-distribution of enzyme activities. The model describes optimal enzyme profiles and metabolite time courses for a simple linear metabolic pathway (n=2). Figure 1 was reproduced using roadRunner. The values of k1 and k2 were not explicitly stated in the publication, but calculations were performed for equal catalytic efficiencies of the enzymes (ki=k), hence the curator assigned k1=k2=1. Also enzyme concentrations are given in units of Etot; times are given in units of 1/(k*Etot) in the papaer, for simplicity , we use defalut units of the SBML to present the concentration and time.
  // This model is hosted on BioModels Database and identified by: MODEL4931762955 .
  // To cite BioModels Database, please use: BioModels Database: An enhanced, curated and annotated resource for published quantitative kinetic models .
  // To the extent possible under law, all copyright and related or neighbouring rights to this encoded model have been dedicated to the public domain worldwide. Please refer to CC0 Public Domain Dedication for more information.
  // biomodels.db:MODEL4931762955
  // biomodels.db:BIOMD0000000104
  // isDescribedBy pubmed:12423338
  // biomodels.db:MODEL4931762955
  // biomodels.db:BIOMD0000000104
  // isVersionOf GO:0003824 GO:0010468

  // Compartments:
  compartment cell = 1;  // isVersionOf GO:0005623

  // Species:
  species S in cell = 1;
  species X1 in cell = 0;
  species E1 in cell = 1;
  species E2 in cell;
  species P in cell = 0;
  // Etot=E1+E2 is constant.
  species $Etot in cell = 1;

  // Assignment rules:
  E2 := Etot - E1;

  // Reactions:
  S_X1: S => X1; cell*S*E1*k1; S_X1 is "S->X1";  // modifiers: E1
    k1 = 1;
  X1_P: X1 => P; cell*k2*X1*E2; X1_P is "X1->P";  // modifiers: E2
    k2 = 1;

  // Events:
  // During the initial phase, t smaller than T1 (T1=1), the whole amount of protein is allocated to the first reaction(E1=Etot, E2=0). At the beginning of the second phase the concentration E2 undergoes an abrupt switch from zero to a finite vaule whereas the concentration E1 is descreased by the same extent.
  single_switch: at (time > 1): E1 = 0.4;
end
